# АР  Экстраполяц принятого сигнала за пределы апертуры
K := 20
d := 0.7
d1 := 2*π*d
M := 2*K
k := 2*π
gr := 180/π
s := 1/(0.83*(M + 1)*d*2.)
ND := 100/(2*K + 1)
dt := 0.1*s
# Дн АР
F(t) := sum(cos(k*d*n*t), n = -K .. K)*1
a1 := 0, 0.2*s .. 0.025*k
# s -  полуширина ДН
F(s)/F(0) = 0.501461
s = 0.0209899
s1 := 1.5*s
# сигн от функ с 2 остр макс
Idel(t) := if(|t| > 0.6*s1, 0, 60*(sin(7.5*(t + 0.*s))^60 + 0))
Idel(t) := if(|t| > s1, 0, 60*(sin(55*(t + 0.*s))^20 + 0))
sss := 0.001
a := -1.5*s1, -1.5*s1 + 0.02*s1 .. 1.5*s1
# сигн от плавной функ
Idel(t) := if(|t| > s1, 0, 60*(sin(28.5*(t + 0.*s))^6 + 0))
# Цель чётная
dtn := -1.*s, -1.*s + dt*0.1 .. 1.*s
# 2s - расстояние между целями
s2 := 0.392*s
s2 = 0.00822803
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# цели - дельта-функ. Для графиков  Idel
Idel(a) := if(-s2 ≤ a ≤ -s2 + sss or s2 - sss ≤ a ≤ s2, 30, 0)
# Принятый сигнал
U00(a) := F(a - s2) + F(a + s2)
U00(0) = 74.6866
2*s2*gr = 0.942863  # Рэлей при 1.27*s
s2 = 0.00822803
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U00(0)/U00(1.*s2) = 1.08977
s1 = 0.0314848
s2 = 0.00822803
a := -s1, -1.*s1 + 0.01*s1 .. s1
n := 0 .. K
# шум
r := 0
# Экстрап для поиска знач сигн, приним-ых "виртуальными" излуч-ми
# CP - предсказание, CR - на самом деле.
C1[n] := 4*cos(k*d*n*s2)
C1[0] := 2*1
C[n] := C1[n]*(1 + rnd(r) - 0.5*r)
U0(a) := sum(C[n]*cos(k*d*n*a), n = 1 .. K)*1.05 + C1[0]
# число виртуалов NP
NP := 400
np := 0 .. NP
CR[0 + np + 0] := 4*cos(k*d*(K + np + 1)*s2)
C[0] := 4
# важно для реш-я заменить 2 на 4
# Потом при счёте U исправить
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CRR := stack(C, CR)
CP := predict(C, K - 1, NP - 1)
CN11 := stack(C, CP)
# совпадают
# предсказание кусками
CN1 := stack(C, CP[0], CP[1], CP[2], CP[3], CP[4], CP[5])
CP1 := predict(CN1, K + 6, NP - 2)
CN2 := stack(CN1, CP1)
CP2 := predict(CN2, K - 0, NP - 0)
CN3 := stack(CN2, CP2[0], CP2[1], CP2[2])
CP3 := predict(CN3, K - 0, NP - 0)
CN4 := stack(CN3, CP2[0], CP2[1], CP2[2])
C = [4; 3.99738; 3.98953; 3.97645; 3.95817; 3.9347; 3.90608; 3.87234; 3.83354; 3.78971; 3.74092; 3.68723; 3.62872; 3.56545; 3.49751; 3.425; 3.348; 3.26661; 3.18095; 3.09112; 2.99724]
CR = [
    2.89944; 2.79784; 2.69258; 2.5838; 2.47162; 2.35622; 2.23772; 2.1163; 1.99211; 1.8653
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]
CP = [
    2.89944; 2.79784; 2.69258; 2.5838; 2.47162; 2.35622; 2.23772; 2.1163; 1.99211; 1.86532
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]
CN2 = [
    4; 3.99738; 3.98953; 3.97645; 3.95817; 3.9347; 3.90608; 3.87234; 3.83354; 3.78971
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]
CN11 = [
    4; 3.99738; 3.98953; 3.97645; 3.95817; 3.9347; 3.90608; 3.87234; 3.83354; 3.78971
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]
n3 := 0 .. 2*K - 1
n7 := 0 .. NP + K
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|C[n] - C1[n]|/C[n] = [0.5; 0; 0; 0; 0; 0; 0; 0; 0; 0; 0; 0; 0; 0; 0; 0; 0; 0; 0; 0; 0]
# Принятый сигнал виртуальной АР - предсказываемый с пом CP1  и CP2
# Решение
# Новая АР с бОльшим числом эл-ов K+NP
NP = 400
KM := K + NP - 1
KM = 419  # Принятый сигн такой же реальной  АР
# ДН новой АР
FM(t) := sum(cos(k*d*n*t), n = 1 .. KM)*2 + 1
UP11(a) := sum(CN11[n]*cos(k*d*n*a), n = 1 .. KM)*1.0 + C1[0]
UP2(a) := sum(CN2[n]*cos(k*d*n*a), n = 1 .. KM)*1.0 + C1[0]
UR0(a) := sum(CRR[n]*cos(k*d*n*a), n = 1 .. KM)*1.05 + C1[0]
a := -s1, -1.*s1 + 0.0125*s1 .. s1
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CN11[0] := 2
NRM := integral(UR(t)^2,  = -s1 .. s1)  # error: Пустой местозаполнитель.
delU := integral((UR(t) - UP1(t))^2,  = -s1 .. s1)/NRM  # error: Пустой местозаполнитель.
a := -1.1*s1, -1.1*s1 + 0.005*s1 .. 1.1*s1
# s2 = 0.4 s1
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# при s2= 0.5 и более - оч хор Рэлей в 3.2 раза
# при 0.38 предельно Рэлей в 4 раза
WRITECSV(CN2, "Berg.csv")
a3 := s1
Given
0.008 ≤ a3 ≤ 0.012
# [component: inputs CN2]
P1 := Maximize(UP2, a3)
P1 = 0.0103607
a4 := 0
Given
0 ≤ a4 ≤ P1
P2 := Minimize(UP2, a4)
P2 = 1e-6
UP2(P2) ≥ UP2(P1)/sqrt(2) = 0
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L := [
    21, 0.015;
    30, 0.013;
    40, 0.011;
    50, 0.0095;
    60, 0.0083;
    70, 0.008;
    80, 0.0083;
    90, 0.01;
    100, 0.011;
    110, 0.0105
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]
# [component: inputs L]
