targets := [-0.027; 0.017]
K := 20
NP := 400
n := -K, -K + 1 .. K
m := -NP, -NP + 1 .. NP
d := 0.7
k := 2*π
num_targets := last(targets)
Cn(K) :=
    n ← 0 .. K
    for l ∈ n
        X[l] ← sum(exp(-1i*k*d*l*targets[j]), j = 0 .. num_targets)
    X
j := 0 .. K
v := 0 .. NP
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