# АР  Экстраполяц принятого сигнала за пределы апертуры
K := 15
d := 0.7
d1 := 2*π*d
M := 2*K
k := 2*π
gr := 180/π
s := 1/(0.82*(M + 1)*d*2.)
ND := 100/(2*K + 1)
ND := 1
dt := 0.1*s
# Дн АР
F(t) := sum(cos(k*d*n*t), n = 1 .. K)*2*ND + ND
Fexp(t) := sum(exp(-1i*(k*d*(n - K)*t)) + exp(1i*(k*d*(n - K)*t)), n = 0 .. K - 1)*ND + ND
a1 := 0, 0.2*s .. 0.125*k
# s -  полушир ДН
F(s)/F(0) = 0.491614
s = 0.0280994
s1 := 1.4*s
sss := 0.01
# Принятый сигнал
a := -1.1*s1, -1.1*s1 + 0.02*s1 .. 1.1*s1
# Цель чётная
dtn := -1.*s, -1.*s + dt*0.1 .. 1.*s
a := -1.1*s1, -1.1*s1 + 0.01*s1 .. 1.1*s1
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# сигн от дельта-функ
s2 := 1.0*s
Idel(a) := if(|a - s2 + sss| ≤ 0.001, 3, if(|a + s2 - sss| ≤ 0.001, 3, 0))
# сигн от функ с 2 остр макс
Idel(t) := if(|t| > s1, 0, 60*(sin(50*(t + 0.*s))^80 + 0))
# сигн от плавной функ
Idel(t) := 10^6*if(|t| > 0.6*s1, 0, 60*(sin(37.5*(t + 0.*s))^60 + 0))
Idel(t) := 10*if(|t| > s1, 0, 60*(cos(100.5*(t + 0.*s))^6 + 0))
a := -s1, -1.*s1 + 0.01*s1 .. s1
U00(a) := integral(F(t - a)*Idel(t), t = -s1 .. s1)
Idel(t) := 10*if(|t| > s1, 0, 60*(sin(53.5*(t + 0.*s))^18 + 0))
# цель - рис для демонстрации
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U00(1.7*s1)/U00(0) = 0.0613312
U00(-s) = 231.844
s1 = 0.0393391
# поиск зоны U = 0.5 max
m2 := 0, 1 .. 402
U1[m2] := U00(-1*s + m2*dt*0.1)
L := max(U1)
L = 323.755
n1 := 1/L
t := -s*2.
U00(t)/U00(0) = 0.200501
Given
t < 0
U00(t)/L == 0.25
sn := Re(Find(t))
t := s*2.33
Given
t > 0
Re(U00(t))/L == 0.25
sv := Re(Find(t))
sv = 0.053112
sn = -0.053112
s = 0.0280994
U0(a) := U00(a)
U00(sv)/U00(0) = 0.25
U00(sv)/L = 0.25
n := 0 .. K
# Автокорр ф-я. Ищем интервал корр-ии
n4 := 1 .. 12*K
UNP(x) := integral(cos(x*t)*Idel(t), t = -s1 .. s1)
KF(t) := integral(UNP(x)*UNP(x - t), x = -s1 .. s1)
KF0 := KF(0)
MKF[0] := 1
MKF[n4] := KF(k*d*n4)/KF0
k*d*K = 65.9734
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# Интерв корр большой - в 4 раза больше размеров апертуры
# и более
# Сильная корр, к-рую можно исп-ть  для уверенных предсказаний, на интерв -  ???  Меньше размер цели даже вну иссл-ого диап-на углов - больше интервал корр
KF(k*d*147)/KF0 = 0.0121977
# Корр интервал???
m4 := 1, K .. 12*K
IKF(m4) := integral(UNP(x)^2, x = 0 .. K*m4)
IKR[m4] := IKF(m4)
NP := 104
np := 1 .. NP
r := 10^-1
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# Экстрап для поиска знач сигн, приним-ых "виртуальными" излуч-ми
# CP - предсказание, CR - на самом деле.
C[n] := integral(cos(k*d*n*t)*Idel(t), t = -s1 .. s1)*(1 + 0.5*rnd(r))
C
CRRR := [1.05; 0.998; 0.97; 0.869; 0.772; 0.611; 0.468; 0.282; 0.1]
CR[K + np] := integral(cos(k*d*(K + np)*t)*Idel(t), t = -s1 .. s1)
CP := predict(C, K - 0, NP - 0)
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CN1 := stack(C, CP[0], CP[1], CP[2])
CP1 := predict(CN1, K - 3, NP - 3)
# Returns a vector of n predicted values past the last element in v, based on autocorrelation coefficients of m consecutive values in a sliding window
CN2 := stack(CN1, CP1[0], CP1[1], CP1[2])  # СР1 - лучший рез-т
CP2 := predict(CN2, K - 3, NP - 6)
CN3 := stack(CN2, CP2[0], CP2[1], CP2[2])
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CR[60] = 0.754296
CP3 := predict(CN3, K - 0, NP - 9)
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integral(cos(k*d*89*t)*Idel(t), t = -s1 .. s1) = 1.57838
integral(cos(k*d*39*t)*9, t = -s1 .. s1) = 0.0470271
# Добавка новых членов, найденн в обл-ти
# высокой корр улучшает предсказ
# дальнейших  на 1 шаге, а дальше ухудшает
# В 2 раза повыш с ор точн
np := 1 .. NP - 2
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K = 15
# Решение
# Новая АР с бОльшим числом эл-ов K+NP
NP = 104
KM := K + NP - 1
KM = 118
# ДН новой АР
FM(t) := sum(cos(k*d*n*t), n = 1 .. KM)*2 + 1
# Принятый сигнал виртуальной АР - предсказываемый с пом CP1  и CP2
UP1(a) := sum(CN1[n]*cos(k*d*n*a), n = 1 .. K + 3)*2 + sum((CP1[n - K - 3]*cos(k*d*(n + 1)*a))*2, n = K + 3 .. KM - 1) + C[0]
# первая зкстр - 3 эл + вторая полн-ю
UP2(a) := sum(CN1[n]*cos(k*d*n*a), n = 1 .. K + 3)*2 + sum((CP1[n - K - 3]*cos(k*d*(n + 1)*a))*2, n = K + 3 .. K + 6) + sum((CP2[n - K - 6]*cos(k*d*(n + 1)*a))*2, n = K + 6 .. KM - 0) + C[0]
# первая зкстр - 3 эл +
# вторая - 3 эл + третья полн-ю
UPalt(a) := sum(C[n]*cos(k*d*n*a), n = 1 .. K)*2 + sum((CP[n - K - 1]*cos(k*d*(n + 1)*a))*2, n = K + 1 .. KM - 1) + C[0]  # только первая экстр
UP3(a) := sum(CN2[n]*cos(k*d*n*a), n = 1 .. K + 3)*2 + sum((CP2[n - K - 3]*cos(k*d*(n + 1)*a))*2, n = K + 4 .. K + 6) + sum((CP2[n - K - 6]*cos(k*d*(n + 1)*a))*2, n = K + 7 .. K + 9) + C[0] + sum((CP3[n - K - 6]*cos(k*d*(n + 1)*a))*2, n = K + 10 .. KM - 3)
UR(a) := integral(FM(t - a)*Idel(t), t = -s1 .. s1)
UP3(0) = 125.771
# Принятый сигн такой же реальн АР
sum((CP3[n - K - 6]*cos(k*d*(n + 1)*0))*2, n = K + 10 .. KM - 3) = 117.936
a := -s1, -1.*s1 + 0.05*s1 .. s1
# Сигн виртуальной АР (синтезированной) и реальной, если бы была, совпадают
# Разрешаются 2 цели даже без доп обраб-ки только при использ-ии дополнит "виртуальных" излуч-лей в АР  При КМ=26 (К=8) разр увелич-ся в 3 раза углов точность тоже
K + 10 = 25
CP3[111 - K - 6] = -10.8678
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KM - 1 = 117
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NRM := integral(UR(t)^2,  = -s1 .. s1)  # error: This placeholder is empty.
delU := integral((UR(t) - UP1(t))^2,  = -s1 .. s1)/NRM  # error: This placeholder is empty.
# Ср. кв откл
# 5%
# Восст по сигналу синтезир-ой АР алг-ми методами
# Получена двухсвяз обл - в ней
delU =  # error: This variable is undefined.
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a := -s1, -1.*s1 + 0.01*s1 .. s1
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s3 := 1.1*s1
a := -s3, -1.*s3 + 0.01*s3 .. s3
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